// COMSOL Multiphysics 6.0.0.318 model "Modeling_C1_transport_in_bulkoil.mph"
// Outline of the model tree

Parameters
  V_tot = 540e-6[m^3]  // System volume
  V_oil_ini = 270e-6 [m^3]  // Initial volume of oil
  M_oil = 0.209[kg/mol]  // Molecular weight of oil
  m_oil = (V_oil_ini)*(ro_oil)  // Mass of oil in the cell
  TOI = 50[C]  // System temperature
  P_ini = 1.01e5[Pa]  // Initial pressure
  P_set = 1.39e7[Pa]  // Setting pressure
  P_inj = 5.45e6[Pa]  // Injection pressure
  time_ini = 100[s]
  R = 8.314[J/(K*mol)]
  TK = 273+50[K]  // System temperature
  q = 6.39E-7[m^3/s]  // Injection rate
  A = 0.008283789[m^2]  // Surface area
  M_C1 = 0.01604[kg/mol]  // Molecular weight of gas
  B = 1e-2[m^3/mol]
  alpha = 0[1/K]
  ro_oil = 820[kg/m^3]  // Density of oil

Variables
  var1 "Variables 1"
    time = t
    m_total = (P_inj/(R*TK))*q*(A^-1)*A*t*M_C1
    P_inj = P_inj+t*6916.037423[Pa/s]
    rho = ro_oil*(1+B*c2)
    kh = (3/(7e3))*P_inj+4e3
    KH = kh*1[m^3/mol]
    rhot = ro_oil*(1-alpha*T+B*c2)

Geometry
  geom1 "Geometry 1" (2D, length unit m)
    r1: Rectangle | size = {0.01, 0.01}
    pt1: Point | p = {0.005, 0.005}
    fin: Finalize "Form Union"

Physics
  tds2: DilutedSpecies "Transport of Diluted Species 2" on domains 1
    dependent variable c2
    ShapeProperty.order_concentration = 3
    cdm1: ConvectionDiffusionMigration "Transport Properties 1" (default)
      minput_temperature_src = fromCommonDef
      u_src = root.comp1.u
      D_c2 = 5e-9[m^2/s]
    nflx1: NoFlux (default)
    init1: init "Initial Values 1" (default)
    conc1: Concentration on boundaries 3 | species = 1; c0 = 1
  ht: HeatTransferInFluids on domains 1
    dependent variable T
    PhysicalModelProperty.Tref = 0[K]
    fluid1: FluidHeatTransferModel "Fluid 1" (default)
      k_mat = userdef
      k = 0.6
      rho_mat = userdef
      rho = rhot
      Cp_mat = userdef
      Cp = 4180
      gamma_mat = userdef
      minput_velocity_src = root.comp1.u
    init1: init "Initial Values 1" (default) | Tinit = 0[K]
    ins1: ThermalInsulation (default)
    temp1: TemperatureBoundary "Temperature 1" on boundaries 2 | T0 = 50[K]
    temp2: TemperatureBoundary "Temperature 2" on boundaries 3 | T0 = 0[K]
  spf: CreepingFlow "LES RBVM" on all domains
    dependent variable u = {u, v, w}
    PhysicalModelProperty.IncludeGravity = 1
    TurbulenceModelProperty.TurbulenceModelType = None
    fp1: FluidProperties (default) | rho_mat = userdef; rho = rhot; mu_mat = userdef; mu = 9e-3
    init1: init "Initial Values 1" (default) | p_init = 0; CompensateForHydrostaticPressure = 0
    wallbc1: WallBC "Wall 1" (default)
    grav1: Gravity
    prpc1: PressurePointConstraint on points 2 | p0 = -p

Mesh
  mesh1 "Mesh 1" (physics-controlled)
    size: MeshSizeDefault | table = cfd; hauto = 4

Studies
  std1 "Study 1"
    time: Transient "Time Dependent" | tlist = range(0,0.5,500); solve for = {tds2, spf}

Solver configurations
  sol1 "Solution 1" (study std1)
    v1: Variables "Dependent Variables 1"
    t1: Time "Time-Dependent Solver 1"
      tlist = range(0,0.5,500)
      rtol = 0.005
      atolglobalfactor = 0.05
      atolmethod = {comp1_c2, global, comp1_p, scaled, comp1_T, global, comp1_u, global}
      atolvaluemethod = {comp1_c2, factor, comp1_p, factor, comp1_T, factor, comp1_u, factor}
      atolfactor = {comp1_c2, 0.1, comp1_p, 1, comp1_T, 0.1, comp1_u, 0.1}
      maxorder = 2
      stabcntrl = on
      bwinitstepfrac = 0.01
      estrat = exclude
      rhoinf = 0.5
      predictor = constant
      fc1: FullyCoupled
        linsolver = d1
        maxiter = 8
        ntolfact = 0.5
        damp = 0.9
        jtech = once
        stabacc = aacc
        aaccdim = 5
        aaccmix = 0.9
        aaccdelay = 1
      d1: Direct "Direct, fluid flow variables (spf) (merged)" | linsolver = pardiso; pivotperturb = 1.0E-13

Datasets
  dset1: Solution | solution = sol1

Derived values
  av1: AvSurface "Surface Average 1" on domains 1
    data = dset1
    table = tbl1
    expr = {d(c2,t), abs(u), c2x, abs(v), c2y, c2xx+c2yy}
    unit = {mol/(m^3*s), m/s, mol/m^4, m/s, mol/m^4, mol/m^5}
    descr = {, , "Gradient of c2, x component", , "Gradient of c2, y component", }
  pev1: EvalPoint "Point Evaluation 1" | data = dset1; table = new; expr = d(d(c,x),x)
  int1: IntSurface "Surface Integration 1" | data = dset1; table = new; expr = cx

Tables
  tbl1: Table
    // Surface Average 1 (d(c2,t), abs(u), c2x, abs(v), c2y, c2xx+c2yy)
    Time (s) | d(c2,t) (mol/(m^3*s)) | abs(u) (m/s) | Gradient of c2, x component (mol/m^4) | abs(v) (m/s) | Gradient of c2, y component (mol/m^4) | c2xx+c2yy (mol/m^5)
    0 | 0.10888 | 1.12053e-10 | -0.00077443 | 4.12793e-10 | 100 | 1.28088e+07
    0.1 | 0.0174508 | 1.59152e-10 | -0.000109817 | 4.46922e-10 | 100 | 1.74417e+06
    0.2 | 0.0125136 | 1.75127e-10 | -7.79912e-05 | 4.33609e-10 | 100 | 1.24054e+06
    0.3 | 0.0102993 | 1.92667e-10 | -6.37433e-05 | 4.33783e-10 | 100 | 1.01799e+06
    0.4 | 0.0089056 | 2.12148e-10 | -5.47368e-05 | 4.4818e-10 | 100 | 880562
    0.5 | 0.00790401 | 2.31919e-10 | -4.86052e-05 | 4.59594e-10 | 100 | 789321
    0.6 | 0.0073001 | 2.52304e-10 | -4.3993e-05 | 4.67344e-10 | 100 | 722036
    0.7 | 0.00673834 | 2.72719e-10 | -4.02015e-05 | 4.77924e-10 | 100 | 667824
    0.8 | 0.0063167 | 2.92457e-10 | -3.70655e-05 | 4.91684e-10 | 100 | 624179
    0.9 | 0.00595829 | 3.1124e-10 | -3.44503e-05 | 5.09032e-10 | 100 | 589019
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
Plots
  pg1: PlotGroup2D "Concentration (tds)" | data = dset1
    surf1: Surface | data = dset1; expr = c2
  pg3: PlotGroup2D "Velocity (spf)" | data = dset1
    surf1: Surface | data = dset1; expr = v; differential = on
  pg4: PlotGroup2D "Pressure (spf)" | data = dset1
    con1: Contour | expr = p; differential = on; contourtype = filled
  pg5: PlotGroup1D "1D Plot Group 5" | data = dset1
    ptgr1: PointGraph "Gas diffusion coefficient (concentration )" on points 3 | expr = c2; typeintitle = off

Exports
  anim2: Animation | giffilename = F:\Software\COMSOL60\Concentration.gif; maxframes = 180; width = 720; frametime = 0.01
  anim3: Animation | target = player